# OpenSim document version 30000
Model:
  ForceSet:
    Thelen2003Muscle muscle0: max_isometric_force=546 optimal_fiber_length=0.0535 tendon_slack_length=0.078
        pennation_angle=0 activation_time_constant=0.01 deactivation_time_constant=0.04 Vmax=10 Vmax0=5
        FmaxTendonStrain=0.033 FmaxMuscleStrain=0.6 KshapeActive=0.5 KshapePassive=4 damping=0.05 Af=0.3 Flen=1.8
      PathPoint muscle0_node0: shoulder (0.04148598 0.02582832 -0.01419879)
      PathPoint muscle0_node1: upperArm (0.02543799 0.01170051 0.08353239)
      PathPoint muscle0_node2: upperArm (0.02543799 0.01170051 -0.07846761)
      PathPoint muscle0_node3: lowerArm (0.03226625 0.03121001 0.06408506)
      PathPoint muscle0_node4: lowerArm (0.03090077 -0.003894935 -0.0780371)
    Thelen2003Muscle muscle1: max_isometric_force=546 optimal_fiber_length=0.0535 tendon_slack_length=0.078
        pennation_angle=0 activation_time_constant=0.01 deactivation_time_constant=0.04 Vmax=10 Vmax0=5
        FmaxTendonStrain=0.033 FmaxMuscleStrain=0.6 KshapeActive=0.5 KshapePassive=4 damping=0.05 Af=0.3 Flen=1.8
      PathPoint muscle1_node0: shoulder (0.03921255 -0.02917168 -0.01419879)
      PathPoint muscle1_node1: upperArm (0.02407354 -0.01429949 0.08353239)
      PathPoint muscle1_node2: upperArm (0.02407354 -0.01429949 -0.07846761)
      PathPoint muscle1_node3: lowerArm (0.02892416 -0.000863691 0.07293138)
      PathPoint muscle1_node4: lowerArm (0.03156187 -0.03389493 -0.0680371)
    Thelen2003Muscle muscle2: max_isometric_force=546 optimal_fiber_length=0.0535 tendon_slack_length=0.078
        pennation_angle=0 activation_time_constant=0.01 deactivation_time_constant=0.04 Vmax=10 Vmax0=5
        FmaxTendonStrain=0.033 FmaxMuscleStrain=0.6 KshapeActive=0.5 KshapePassive=4 damping=0.05 Af=0.3 Flen=1.8
      PathPoint muscle2_node0: shoulder (-0.0414844 0.02582832 -0.01419879)
      PathPoint muscle2_node1: upperArm (-0.02543795 0.01170051 0.08353239)
      PathPoint muscle2_node2: upperArm (-0.02543795 0.01170051 -0.07846761)
      PathPoint muscle2_node3: lowerArm (-0.03226513 0.03121001 0.06408506)
      PathPoint muscle2_node4: lowerArm (-0.03089965 -0.003894935 -0.0780371)
    Thelen2003Muscle muscle3: max_isometric_force=546 optimal_fiber_length=0.0535 tendon_slack_length=0.078
        pennation_angle=0 activation_time_constant=0.01 deactivation_time_constant=0.04 Vmax=10 Vmax0=5
        FmaxTendonStrain=0.033 FmaxMuscleStrain=0.6 KshapeActive=0.5 KshapePassive=4 damping=0.05 Af=0.3 Flen=1.8
      PathPoint muscle3_node0: shoulder (-0.03921096 -0.02917168 -0.01419879)
      PathPoint muscle3_node1: upperArm (-0.02407349 -0.01429949 0.08353239)
      PathPoint muscle3_node2: upperArm (-0.02407349 -0.01429949 -0.07846761)
      PathPoint muscle3_node3: lowerArm (-0.02892304 -0.000863691 0.07293138)
      PathPoint muscle3_node4: lowerArm (-0.03156075 -0.03389493 -0.0680371)
