# OpenSim document version 30000
Model:
  ForceSet:
    Thelen2003Muscle [values shared by the 8 below unless stated]: max_isometric_force=546 optimal_fiber_length=0.0535
        tendon_slack_length=0.078 pennation_angle=0 activation_time_constant=0.01 deactivation_time_constant=0.04
        Vmax=10 Vmax0=5 FmaxTendonStrain=0.033 FmaxMuscleStrain=0.6 KshapeActive=0.5 KshapePassive=4 damping=0.05
        Af=0.3 Flen=1.8
    Thelen2003Muscle muscle7:
      PathPoint muscle7_node0: base (-0.1891241 -0.01325522 0.0176026)
      PathPoint muscle7_node1: top (-0.02597735 -0.04925369 0.009266135)
    Thelen2003Muscle muscle6:
      PathPoint muscle6_node0: base (-0.01255081 -0.1898285 0.0176026)
      PathPoint muscle6_node1: top (-0.02597735 -0.04925369 0.009266135)
    Thelen2003Muscle muscle1:
      PathPoint muscle1_node0: base (-0.01255081 0.1888617 0.0176026)
      PathPoint muscle1_node1: top (-0.04815496 -0.02038403 -0.0209587)
    Thelen2003Muscle muscle0:
      PathPoint muscle0_node0: base (-0.1891241 0.01228845 0.0176026)
      PathPoint muscle0_node1: top (-0.04815496 -0.02038403 -0.0209587)
    Thelen2003Muscle muscle3:
      PathPoint muscle3_node0: base (0.1895661 0.01228845 0.0176026)
      PathPoint muscle3_node1: top (-0.01119063 -0.02280816 -0.05039689)
    Thelen2003Muscle muscle2:
      PathPoint muscle2_node0: base (0.01299286 0.1888617 0.0176026)
      PathPoint muscle2_node1: top (-0.01119063 -0.02280816 -0.05039689)
    Thelen2003Muscle muscle5:
      PathPoint muscle5_node0: base (0.01299286 -0.1898285 0.0176026)
      PathPoint muscle5_node1: top (0.01098698 -0.05167782 -0.02017205)
    Thelen2003Muscle muscle4:
      PathPoint muscle4_node0: base (0.1895661 -0.01325522 0.0176026)
      PathPoint muscle4_node1: top (0.01098698 -0.05167782 -0.02017205)
