# OpenSim document version 30000
Model:
  ForceSet:
    Thelen2003Muscle left_bottom: max_isometric_force=1000 optimal_fiber_length=0.2062113
        tendon_slack_length=0.02291237
      PathPoint left_bottom_node0: HoldingFrame (0.105 0.03501 -0.000006)
      PathPoint left_bottom_node1: HoldingFrame (0.15 0.06501 -0.000006)
      PathPoint left_bottom_node2: HoldingFrame (0.078681 0.06501 -0.000006)
      PathPoint left_bottom_node3: HumerusBone (-0.000961 0.09431 -0.017092)
    Thelen2003Muscle left_top: max_isometric_force=1000 optimal_fiber_length=0.5736711 tendon_slack_length=0.06374124
      PathPoint left_top_node0: HumerusBone (-0.023332 0.260095 -0.017978)
      PathPoint left_top_node1: HumerusBone (-0.05011 0.216507 -0.018392)
      PathPoint left_top_node2: HumerusBone (-0.038898 0.288409 -0.018412)
      PathPoint left_top_node3: HumerusBone (-0.037504 0.38 -0.018359)
      PathPoint left_top_node4: RadiusBone (-0.015 0.12 0.018611)
      PathWrap PathWrap3: wrap_object=WrapJoint2 method=midpoint
      PathWrap PathWrap2: wrap_object=WrapJoint method=midpoint
    Thelen2003Muscle right_bottom: max_isometric_force=1000 optimal_fiber_length=0.2194156
        tendon_slack_length=0.02437951
      PathPoint right_bottom_node0: HoldingFrame (-0.105 0.03501 -0.000006)
      PathPoint right_bottom_node1: HoldingFrame (-0.15 0.06501 -0.000006)
      PathPoint right_bottom_node2: HoldingFrame (-0.0768 0.06501 -0.000006)
      PathPoint right_bottom_node3: HumerusBone (-0.00096 0.094308 -0.017092)
    Thelen2003Muscle right_top: max_isometric_force=1000 optimal_fiber_length=0.4747923 tendon_slack_length=0.0527547
      PathPoint right_top_node0: HumerusBone (0.027057 0.2764 -0.016765)
      PathPoint right_top_node1: HumerusBone (0.051788 0.239094 -0.016857)
      PathPoint right_top_node2: HumerusBone (0.041881 0.303365 -0.016857)
      PathPoint right_top_node3: HumerusBone (0.037163 0.38 -0.016857)
      PathPoint right_top_node4: RadiusBone (0.015 0.12 0.018611)
      PathWrap PathWrap3: wrap_object=WrapJoint2 method=midpoint
      PathWrap PathWrap2: wrap_object=WrapJoint method=midpoint
  BodySet:
    Body HumerusBone:
      WrapCylinder WrapJoint2: xyz_body_rotation=(0 0 1.57) translation=(0 0.38 0) radius=0.023 length=0.05
      WrapCylinder WrapJoint: xyz_body_rotation=(0 0 1.57) translation=(0 0.42 0) radius=0.022 length=0.05
