# OpenSim document version 30000
Model:
  ForceSet:
    Thelen2003Muscle muscle_left: max_isometric_force=1000 optimal_fiber_length=0.1410809
        tendon_slack_length=0.01567566 stiffness=100000 dissipation=1
      PathPoint muscle_left_node0: base (0 0.41 -0.04)
      PathPoint muscle_left_node1: base (-0.001763 0.44 -0.04)
      PathPoint muscle_left_node2: arm (0.002008 0.059 -0.019286)
      PathPoint muscle_left_node3: arm (0.002 0.059 0.001)
      PathWrap PathWrap2: wrap_object=WrapJoint method=midpoint
    Thelen2003Muscle muscle_right: max_isometric_force=1000 optimal_fiber_length=0.1410809
        tendon_slack_length=0.01567566
      PathPoint muscle_right_node0: base (0 0.41 0.04)
      PathPoint muscle_right_node1: base (0 0.44 0.04)
      PathPoint muscle_right_node2: arm (0 0.059 0.0252)
      PathPoint muscle_right_node3: arm (0 0.059 0.001)
      PathWrap PathWrap2: wrap_object=WrapJoint method=midpoint
  BodySet:
    Body base:
      WrapCylinder WrapJoint: xyz_body_rotation=(0 1.57 0) translation=(0 0.48 0) radius=0.018 length=0.05
