# OpenSim document version 30000
Model:
  ForceSet:
    Millard2012EquilibriumMuscle vastus: max_isometric_force=500 optimal_fiber_length=0.19 default_fiber_length=0.19
        tendon_slack_length=0.19 pennation_angle_at_optimal=0 [radians] fatigue_factor=0 recovery_factor=0.2
      PathPoint origin: thigh (0 0.25 0.05)
      PathPoint insertion: shank (0 0.08 -0.15)
      PathWrap: wrap_object=patella method=hybrid
  BodySet:
    Body thigh:
      WrapCylinder patella: xyz_body_rotation=(0 -1.548932 0) translation=(0 0.5 0) quadrant=x radius=0.07 length=0.1
