# OpenSim document version 20303
Model:
  ForceSet:
    Thelen2003Muscle TRIlong: max_isometric_force=798.52 optimal_fiber_length=0.134 tendon_slack_length=0.143
      PathPoint P1: base (-0.05365 -0.01373 0.14723)
      PathPoint P2: r_humerus (-0.02714 -0.11441 -0.00664)
      PathPoint P3: r_humerus (-0.03184 -0.22637 -0.01217)
      PathPoint P4: r_humerus (-0.01743 -0.26757 -0.01208)
      PathPoint P5: r_ulna_radius_hand (-0.0219 0.01046 -0.00078)
    Thelen2003Muscle TRIlat: max_isometric_force=624.3 optimal_fiber_length=0.1138 tendon_slack_length=0.098
      PathPoint P1: r_humerus (-0.00599 -0.12646 0.00428)
      PathPoint P2: r_humerus (-0.02344 -0.14528 0.00928)
      PathPoint P3: r_humerus (-0.03184 -0.22637 -0.01217)
      PathPoint P4: r_humerus (-0.01743 -0.26757 -0.01208)
      PathPoint P5: r_ulna_radius_hand (-0.0219 0.01046 -0.00078)
    Thelen2003Muscle TRImed: max_isometric_force=624.3 optimal_fiber_length=0.1138 tendon_slack_length=0.0908
      PathPoint P1: r_humerus (-0.00838 -0.13695 -0.00906)
      PathPoint P2: r_humerus (-0.02601 -0.15139 -0.0108)
      PathPoint P3: r_humerus (-0.03184 -0.22637 -0.01217)
      PathPoint P4: r_humerus (-0.01743 -0.26757 -0.01208)
      PathPoint P5: r_ulna_radius_hand (-0.0219 0.01046 -0.00078)
    Thelen2003Muscle BIClong: max_isometric_force=624.3 optimal_fiber_length=0.1157 tendon_slack_length=0.2723
      PathPoint P1: base (-0.039235 0.00347 0.14795)
      PathPoint P2: base (-0.028945 0.01391 0.15639)
      PathPoint P3: r_humerus (0.02131 0.01793 0.01028)
      PathPoint P4: r_humerus (0.02378 -0.00511 0.01201)
      PathPoint P5: r_humerus (0.01345 -0.02827 0.00136)
      PathPoint P6: r_humerus (0.01068 -0.07736 -0.00165)
      PathPoint P7: r_humerus (0.01703 -0.12125 0.00024)
      PathPoint P8: r_humerus (0.0228 -0.1754 -0.0063)
      PathPoint P9: r_ulna_radius_hand (0.00751 -0.04839 0.02179)
    Thelen2003Muscle BICshort: max_isometric_force=435.56 optimal_fiber_length=0.1321 tendon_slack_length=0.1923
      PathPoint P1: base (0.004675 -0.01231 0.13475)
      PathPoint P2: base (-0.007075 -0.04004 0.14507)
      PathPoint P3: r_humerus (0.01117 -0.07576 -0.01101)
      PathPoint P4: r_humerus (0.01703 -0.12125 -0.01079)
      PathPoint P5: r_humerus (0.0228 -0.1754 -0.0063)
      PathPoint P6: r_ulna_radius_hand (0.00751 -0.04839 0.02179)
    Thelen2003Muscle BRA: max_isometric_force=987.26 optimal_fiber_length=0.0858 tendon_slack_length=0.0535
      PathPoint P1: r_humerus (0.0068 -0.1739 -0.0036)
      PathPoint P2: r_ulna_radius_hand (-0.0032 -0.0239 0.0009)
    Thelen2003Muscle muscle0: max_isometric_force=1000 optimal_fiber_length=0.5 tendon_slack_length=0.015
      PathPoint muscle0_node0: shoulder (0.04152097 0.02600001 -0.01476613)
      PathPoint muscle0_node1: upperArm (0.02479923 0.013 0.08614386)
    Thelen2003Muscle muscle1: max_isometric_force=1000 optimal_fiber_length=0.5 tendon_slack_length=0.015
      PathPoint muscle1_node0: shoulder (0.04270816 -0.02399999 -0.01476613)
      PathPoint muscle1_node1: upperArm (0.02364321 -0.015 0.08614386)
    Thelen2003Muscle muscle4: max_isometric_force=1000 optimal_fiber_length=0.15 tendon_slack_length=0.015
      PathPoint muscle4_node0: upperArm (0.02479923 0.013 -0.07385614)
      PathPoint muscle4_node1: lowerArm (0.03087428 0.03534872 0.06816107)
    Thelen2003Muscle muscle5: max_isometric_force=1000 optimal_fiber_length=0.15 tendon_slack_length=0.015
      PathPoint muscle5_node0: upperArm (0.02364321 -0.015 -0.07385614)
      PathPoint muscle5_node1: lowerArm (0.02971874 0.00154132 0.07721973)
    Thelen2003Muscle muscle2: max_isometric_force=1000 optimal_fiber_length=0.5 tendon_slack_length=0.015
      PathPoint muscle2_node0: shoulder (-0.04152123 0.02600001 -0.01476613)
      PathPoint muscle2_node1: upperArm (-0.02364315 0.015 0.08614386)
    Thelen2003Muscle muscle3: max_isometric_force=1000 optimal_fiber_length=0.5 tendon_slack_length=0.015
      PathPoint muscle3_node0: shoulder (-0.04270843 -0.02399999 -0.01476613)
      PathPoint muscle3_node1: upperArm (-0.02479916 -0.013 0.08614386)
    Thelen2003Muscle muscle6: max_isometric_force=1000 optimal_fiber_length=0.25 tendon_slack_length=0.015
      PathPoint muscle6_node0: upperArm (-0.02364315 0.015 -0.07385614)
      PathPoint muscle6_node1: lowerArm (-0.02970347 0.03728058 0.06764343)
    Thelen2003Muscle muscle7: max_isometric_force=1000 optimal_fiber_length=0.25 tendon_slack_length=0.25
      PathPoint muscle7_node0: upperArm (-0.02479916 -0.013 -0.07385614)
      PathPoint muscle7_node1: lowerArm (-0.03085901 0.003473172 0.0767021)
  BodySet:
    Body base:
      WrapCylinder TRIlongglen: xyz_body_rotation=(1.37532 -0.294612 2.43596) translation=(-0.043905 -0.0039 0.1478)
          quadrant=x radius=0.003 length=0.03
    Body r_humerus:
      WrapEllipsoid TRIlonghh: xyz_body_rotation=(3.00162 -0.853466 2.57419) translation=(-0.0078 -0.0041 -0.0014)
          quadrant=z dimensions=(0.035 0.02 0.02)
      WrapEllipsoid BIClonghh: xyz_body_rotation=(-2.00434 -1.00164 0.975465) translation=(0.0033 0.0073 0.0003)
          quadrant=-y dimensions=(0.025 0.02 0.02)
      WrapCylinder TRI: xyz_body_rotation=(-0.14015 -0.00628319 0.154985) translation=(0.0028 -0.2919 -0.0069)
          quadrant=all radius=0.016 length=0.05
    Body r_ulna_radius_hand
