# OpenSim document version 20303
Model:
  ForceSet:
    Thelen2003Muscle bifemlh_r: max_isometric_force=2594 optimal_fiber_length=0.1282385 tendon_slack_length=0.383539
      PathPoint P1: pelvis (-0.131752 -0.107287 0.0726333)
      PathPoint P2: tibia_r (-0.0338242 -0.0404542 0.0330713)
      PathPoint P3: tibia_r (-0.0262952 -0.0632659 0.0385439)
    Thelen2003Muscle bifemsh_r: max_isometric_force=960 optimal_fiber_length=0.2008373 tendon_slack_length=0.1033209
      PathPoint P1: femur_r (0.0058689 -0.247785 0.0274665)
      PathPoint P2: tibia_r (-0.0338242 -0.0404542 0.0330713)
      PathPoint P3: tibia_r (-0.0262952 -0.0632659 0.0385439)
    Thelen2003Muscle glut_max2_r: max_isometric_force=1944 optimal_fiber_length=0.1629139 tendon_slack_length=0.1407488
      PathPoint P1: pelvis (-0.141103 0.0184094 0.058889)
      PathPoint P2: pelvis (-0.143928 -0.0543913 0.0956031)
      PathPoint P3: femur_r (-0.050003 -0.0622103 0.0343917)
      PathPoint P4: femur_r (-0.018311 -0.119256 0.0491814)
    Thelen2003Muscle psoas_r: max_isometric_force=2342 optimal_fiber_length=0.1074282 tendon_slack_length=0.1718851
      PathPoint P1: pelvis (-0.0676753 0.0927789 0.030229)
      PathPoint P2: pelvis (-0.0248945 -0.0596212 0.0793903)
      ConditionalPathPoint P3: pelvis (-0.0301244 -0.0842019 0.0853524) range=(-1.5708 0.785398)
          coordinate=hip_flexion_r
      PathPoint P4: femur_r (0.00187804 -0.0595106 0.00446036)
      PathPoint P5: femur_r (-0.0220671 -0.0700747 0.0122073)
    Thelen2003Muscle rect_fem_r: max_isometric_force=1169 optimal_fiber_length=0.1328739 tendon_slack_length=0.3613238
      PathPoint P1: pelvis (-0.0308566 -0.0325302 0.101251)
      ConditionalPathPoint P2: femur_r (0.0392043 -0.473033 0.00223019) range=(-2.61799 -1.45997)
          coordinate=knee_angle_r
      MovingPathPoint P3: tibia_r (0.0483849 0.0271086 0.00157322) x_coordinate=knee_angle_r y_coordinate=knee_angle_r
          z_coordinate=knee_angle_r
        x_location: MultiplierFunction: scale=1
          SimmSpline: x=(-2.0944 -1.99997 -1.5708 -1.45752 -1.39626 -1.0472 -0.698132 -0.526391 -0.349066 -0.174533 0 0.00017453 0.00034907 0.0279253 0.0872665 0.174533 2.0944)
              y=(0.0175082 0.0202202 0.0309116 0.0333257 0.0345676 0.0410942 0.0474297 0.0506691 0.0543783 0.0600407 0.0693987 0.0694092 0.0694196 0.0711413 0.075283 0.0823732 0.0644437)
        y_location: MultiplierFunction: scale=1
          SimmSpline: x=(-2.0944 -1.99997 -1.5708 -1.45752 -1.39626 -1.0472 -0.698132 -0.526391 -0.349066 -0.174533 0 0.00017453 0.00034907 0.0279253 0.0872665 0.174533 2.0944)
              y=(0.0263083 0.0267012 0.0282215 0.0284073 0.0284468 0.0280015 0.0272362 0.026795 0.0263174 0.025581 0.0235803 0.0235774 0.0235745 0.0230617 0.0215479 0.0179296 -0.0757138)
        z_location: MultiplierFunction: scale=1
          SimmSpline: x=(-2.0944 0.1745) y=(0.00157322 0.00157322)
    Thelen2003Muscle vas_int_r: max_isometric_force=4530 optimal_fiber_length=0.1261733 tendon_slack_length=0.136786
      PathPoint P1: femur_r (0.0340396 -0.225835 0.0363872)
      PathPoint P2: femur_r (0.0393216 -0.244616 0.0334527)
      ConditionalPathPoint P3: femur_r (0.0402607 -0.473033 0.00645579) range=(-2.61799 -1.42) coordinate=knee_angle_r
      MovingPathPoint P4: tibia_r (0.0402373 0.0297699 0.00202271) x_coordinate=knee_angle_r y_coordinate=knee_angle_r
          z_coordinate=knee_angle_r
        x_location: MultiplierFunction: scale=1
          SimmSpline: x=(-2.0944 -1.99997 -1.5708 -1.45752 -1.39626 -1.0472 -0.698132 -0.526391 -0.349066 -0.174533 0 0.00017453 0.00034907 0.0279253 0.0872665 0.174533 2.0944)
              y=(0.00929694 0.0120089 0.022704 0.0251187 0.0263607 0.0328932 0.0392704 0.0425567 0.0463615 0.0522856 0.0623256 0.0623371 0.0623486 0.0642454 0.0688531 0.0769044 0.0729095)
        y_location: MultiplierFunction: scale=1
          SimmSpline: x=(-2.0944 -1.99997 -1.5708 -1.45752 -1.39626 -1.0472 -0.698132 -0.526391 -0.349066 -0.174533 0 0.00017453 0.00034907 0.0279253 0.0872665 0.174533 2.0944)
              y=(0.0287664 0.0291593 0.0306917 0.0308797 0.0309195 0.0304938 0.0298616 0.0295622 0.0293503 0.0292314 0.0284217 0.0284203 0.0284189 0.0281523 0.0272157 0.0245296 -0.0770547)
        z_location: MultiplierFunction: scale=1
          SimmSpline: x=(-2.0944 2.0944) y=(0.00202271 0.00202271)
    Thelen2003Muscle med_gas_r: max_isometric_force=2241 optimal_fiber_length=0.1031128 tendon_slack_length=0.4124513
      PathPoint P1: femur_r (-0.0223018 -0.461178 -0.0275838)
      ConditionalPathPoint P2: femur_r (-0.0352134 -0.472094 -0.0302835) range=(-0.785398 0.174533)
          coordinate=knee_angle_r
      PathPoint P3: calcn_r (0 0.0318348 -0.00544272)
    Thelen2003Muscle soleus_r: max_isometric_force=5137 optimal_fiber_length=0.092647 tendon_slack_length=0.2547793
      PathPoint P1: tibia_r (-0.00269695 -0.172268 0.00797847)
      PathPoint P2: calcn_r (0 0.0318348 -0.00544272)
    Thelen2003Muscle tib_ant_r: max_isometric_force=1759 optimal_fiber_length=0.1100528 tendon_slack_length=0.2504262
      PathPoint P1: tibia_r (0.0201147 -0.182493 0.0129229)
      PathPoint P2: tibia_r (0.0369707 -0.443985 -0.01989)
      PathPoint P3: calcn_r (0.11974 0.0182793 -0.0313213)
  BodySet:
    Body ground
    Body pelvis
    Body femur_r
    Body tibia_r
    Body patella_r
    Body talus_r
    Body calcn_r
    Body toes_r
